#
# Expected eigenfrequencies:
#
#	1: 91.278 - side to side
#	2: 407.58 - up and down
#	3: 569.90 - wobble side to side
#	4: 1588.3 - double wobble side to side
#	5: 1618.1 - twist
#	6: 2441.6 - wobble up and down
#	7: 3093.2 - tripple wobble side to side
#
#	Abaqus seems to include effects of rotational inertia
#	in the mass distributed all over the model, not just
#	DOFs 1, 2 and 3.
#
#

*Heading
** Job name: xhex8_beam Model name: Model-1
** Generated by: Abaqus/CAE Student Edition 2021
*Preprint, echo=NO, model=NO, history=NO, contact=NO
**
** PARTS
**
*Part, name=Part-1
*Node
      1,        -100.,         -10.,           5.
      2,        -100.,          -5.,           5.
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*Element, type=C3D8R
  1,  11,  12,  17,  16,   1,   2,   7,   6
  2,  12,  13,  18,  17,   2,   3,   8,   7
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*Nset, nset=Set-1, generate
   1,  410,    1
*Elset, elset=Set-1, generate
   1,  160,    1
** Section: Section-1
*Solid Section, elset=Set-1, material=Material-1
,
*End Part
**
**
** ASSEMBLY
**
*Assembly, name=Assembly
**
*Instance, name=Part-1-1, part=Part-1
*End Instance
**
*Nset, nset=Set-1, instance=Part-1-1, generate
  1,  10,   1
*Elset, elset=Set-1, instance=Part-1-1, generate
 1,  4,  1
*End Assembly
**
** MATERIALS
**
*Material, name=Material-1
*Density
 2.7e-09,
*Elastic
68900., 0.35
** ----------------------------------------------------------------
**
** STEP: Step-1
**
*Step, name=Step-1, nlgeom=NO, perturbation
*Frequency, eigensolver=Lanczos, sim, acoustic coupling=on, normalization=mass
, , 4000., , ,
**
** BOUNDARY CONDITIONS
**
** Name: BC-1 Type: Displacement/Rotation
*Boundary
Set-1, 1, 1
Set-1, 2, 2
Set-1, 3, 3
Set-1, 4, 4
Set-1, 5, 5
Set-1, 6, 6
**
** OUTPUT REQUESTS
**
*Restart, write, frequency=0
**
** FIELD OUTPUT: F-Output-1
**
*Output, field, variable=PRESELECT
*End Step
