*Heading
** Job name: xquad4_plate_with_hole Model name: Model-1
** Generated by: Abaqus/CAE Student Edition 2021
*Preprint, echo=NO, model=NO, history=NO, contact=NO
**
** PARTS
**
*Part, name=Part-1
*Node
      1,           0.,   28.4007969
      2,           0.,          25.
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*Element, type=CPS4R
  1,   1,   2,  12,  21
  2,  21,  12,  13,  20
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*Nset, nset=Set-1, generate
   1,  211,    1
*Elset, elset=Set-1, generate
   1,  180,    1
** Section: Section-2
*Solid Section, elset=Set-1, material=Material-1, ref node=Part-1-RefPt_
5.,
*End Part
**
**
** ASSEMBLY
**
*Assembly, name=Assembly
**
*Instance, name=Part-1-1, part=Part-1
*End Instance
**
*Nset, nset=Set-1, instance=Part-1-1
  5,  6,  7, 32, 33, 34, 35, 36, 37, 38, 39, 40, 41
*Elset, elset=Set-1, instance=Part-1-1, generate
 12,  23,   1
*Nset, nset=Set-2, instance=Part-1-1
  1,  2, 11, 82, 83, 84, 85, 86
*Elset, elset=Set-2, instance=Part-1-1
   1, 150, 156, 162, 168, 174, 180
*Elset, elset=_Surf-1_S2, internal, instance=Part-1-1, generate
 23,  78,  11
*Elset, elset=_Surf-1_S1, internal, instance=Part-1-1, generate
 79,  84,   1
*Surface, type=ELEMENT, name=Surf-1
_Surf-1_S2, S2
_Surf-1_S1, S1
*End Assembly
**
** MATERIALS
**
*Material, name=Material-1
*Elastic
68900., 0.29
** ----------------------------------------------------------------
**
** STEP: Step-1
**
*Step, name=Step-1, nlgeom=NO
*Static
1., 1., 1e-05, 1.
**
** BOUNDARY CONDITIONS
**
** Name: BC-1 Type: Symmetry/Antisymmetry/Encastre
*Boundary
Set-1, YSYMM
** Name: BC-2 Type: Symmetry/Antisymmetry/Encastre
*Boundary
Set-2, XSYMM
**
** LOADS
**
** Name: Load-1   Type: Surface traction
*Dsload
Surf-1, TRVEC, 50., 1., 0., 0.
**
** OUTPUT REQUESTS
**
*Restart, write, frequency=0
**
** FIELD OUTPUT: F-Output-1
**
*Output, field, variable=PRESELECT
**
** HISTORY OUTPUT: H-Output-1
**
*Output, history, variable=PRESELECT
*End Step
